Airbus_A220-100

#Mach
 0.0

#Iysym   IZsym   Zsym
  0      0     0.0

#Sref    Cref    Bref 	<meters>
150.08344467126278      4.455934952827808     40.57734549808431

#Xref    Yref    Zref   <meters>
15.279349269408012      0.0     -0.93234881359062

#---------------------------------------------------------
SURFACE
main_wing_1
#Nchordwise  Cspace   Nspanwise  Sspace  Njet
10         1.0         30      1.0       12

COMPONENT
2

YDUPLICATE
0.0

SECTION
# Root
#Xle    Yle      Zle      Chord     Ainc  Nspanwise  Sspace
13.2184  0.0    -0.9323    6.742    0.0
AFILE
B737a.dat

SECTION
# Yehudi
#Xle    Yle      Zle      Chord     Ainc  Nspanwise  Sspace
13.2184  1.844    -0.9323    6.742    0.0
AFILE
B737b.dat

SECTION
# Section 2_section_4.057734549808432m
#Xle    Yle      Zle      Chord     Ainc  Nspanwise  Sspace
14.5496  4.0577    -0.9323    5.5466    0.0
AFILE
B737c.dat
CONTROL
slat    -1.0   -0.075   0. 0. 0.  +1
CONTROL
flap    1.0   0.7   0. 0. 0.  +1

SECTION
# Tip_section_7.101035462164754m
#Xle    Yle      Zle      Chord     Ainc  Nspanwise  Sspace
16.3795  7.101    -0.9323    3.9033    0.0
AFILE
B737d.dat
CONTROL
slat    -1.0   -0.075   0. 0. 0.  +1
CONTROL
flap    1.0   0.7   0. 0. 0.  +1

SECTION
# Tip_section_14.202070924329508m
#Xle    Yle      Zle      Chord     Ainc  Nspanwise  Sspace
20.0347  14.2021    -0.9323    2.5276    0.0
AFILE
B737d.dat
CONTROL
slat    -1.0   -0.075   0. 0. 0.  +1
CONTROL
flap    1.0   0.7   0. 0. 0.  +1
CONTROL
aileron    -1.0   0.84   0. 0. 0.  -1

SECTION
# Tip_section_19.537991857327597m
#Xle    Yle      Zle      Chord     Ainc  Nspanwise  Sspace
22.7813  19.538    -0.9323    1.4938    0.0
AFILE
B737d.dat
CONTROL
slat    -1.0   -0.075   0. 0. 0.  +1
CONTROL
aileron    -1.0   0.84   0. 0. 0.  -1

SECTION
# Tip
#Xle    Yle      Zle      Chord     Ainc  Nspanwise  Sspace
23.1677  20.2887    -0.9323    1.3484    0.0
AFILE
B737d.dat

#---------------------------------------------------------
SURFACE
horizontal_stabilizer
#Nchordwise  Cspace   Nspanwise  Sspace
10         1.0         30      1.0

COMPONENT
1


YDUPLICATE
0.0


SECTION
# root_segment
#Xle    Yle      Zle      Chord     Ainc  Nspanwise  Sspace
32.9671  0.0    1.0597    4.1229    0.0

SECTION
# tip_segment_section_0.5449034507203847m
#Xle    Yle      Zle      Chord     Ainc  Nspanwise  Sspace
33.3668  0.5449    1.0597    3.908    0.0
CONTROL
elevator    1.0   0.7   0. 0. 0.  +1

SECTION
# tip_segment_section_5.570124162919489m
#Xle    Yle      Zle      Chord     Ainc  Nspanwise  Sspace
37.0527  5.5701    1.0597    1.9269    0.0
CONTROL
elevator    1.0   0.7   0. 0. 0.  +1

SECTION
# tip_segment
#Xle    Yle      Zle      Chord     Ainc  Nspanwise  Sspace
37.408  6.0545    1.0597    1.7359    0.0


#---------------------------------------------------------
SURFACE
vertical_stabilizer
#Nchordwise  Cspace   Nspanwise  Sspace
10         1.0         30      -1.1

COMPONENT
1


SECTION
# root_section
#Xle    Yle      Zle      Chord     Ainc  Nspanwise  Sspace
27.9958  0.0    1.0862    9.4283    0.0

SECTION
# tip_section
#Xle    Yle      Zle      Chord     Ainc  Nspanwise  Sspace
36.9951  0.0    8.6454    3.0305    0.0


#---------------------------------------------------------
SURFACE
fuselage_horizontal
#Nchordwise  Cspace   Nspanwise  Sspace
10           1.0        30      0.0

SECTION
#Xle     Yle      Zle      Chord     Ainc  Nspanwise  Sspace
4.8586    -1.85     0.0     26.0099     0.0      1        0

SECTION
#Xle     Yle      Zle      Chord     Ainc  Nspanwise  Sspace
2.7571    -1.48     0.0     32.2799     0.0      1        0

SECTION
#Xle     Yle      Zle      Chord     Ainc  Nspanwise  Sspace
1.6557    -1.11     0.0     35.108     0.0      1        0

SECTION
#Xle     Yle      Zle      Chord     Ainc  Nspanwise  Sspace
0.8586    -0.74     0.0     37.2301     0.0      1        0

SECTION
#Xle     Yle      Zle      Chord     Ainc  Nspanwise  Sspace
0.2942    -0.37     0.0     38.3729     0.0      1        0

SECTION
#Xle     Yle      Zle      Chord     Ainc  Nspanwise  Sspace
0.0    0.0     0.0     38.6671     0.0      1        0

SECTION
#Xle     Yle      Zle      Chord     Ainc  Nspanwise  Sspace
0.2942    0.37     0.0     38.3729     0.0      1        0

SECTION
#Xle     Yle      Zle      Chord     Ainc  Nspanwise  Sspace
0.8586    0.74     0.0     37.2301     0.0      1        0

SECTION
#Xle     Yle      Zle      Chord     Ainc  Nspanwise  Sspace
1.6557    1.11     0.0     35.108     0.0      1        0

SECTION
#Xle     Yle      Zle      Chord     Ainc  Nspanwise  Sspace
2.7571    1.48     0.0     32.2799     0.0      1        0

SECTION
#Xle     Yle      Zle      Chord     Ainc  Nspanwise  Sspace
4.8586    1.85     0.0     26.0099     0.0      1        0


#---------------------------------------------------------
SURFACE
fuselage_vertical
#Nchordwise  Cspace   Nspanwise  Sspace
10           1.0        30      0.0

SECTION
#Xle     Yle      Zle      Chord     Ainc  Nspanwise  Sspace
4.8586    0.0     -1.85     26.0099     0.0      1        0

SECTION
#Xle     Yle      Zle      Chord     Ainc  Nspanwise  Sspace
0.3786    0.0     -1.48     33.4916     0.0      1        0

SECTION
#Xle     Yle      Zle      Chord     Ainc  Nspanwise  Sspace
0.013    0.0     -1.11     35.1005     0.0      1        0

SECTION
#Xle     Yle      Zle      Chord     Ainc  Nspanwise  Sspace
0.0559    0.0     -0.74     36.0117     0.0      1        0

SECTION
#Xle     Yle      Zle      Chord     Ainc  Nspanwise  Sspace
0.2942    0.0     -0.37     36.5777     0.0      1        0

SECTION
#Xle     Yle      Zle      Chord     Ainc  Nspanwise  Sspace
0.6453    0.0     0.0     36.9352     0.0      1        0

SECTION
#Xle     Yle      Zle      Chord     Ainc  Nspanwise  Sspace
1.0971    0.0     0.37     37.1241     0.0      1        0

SECTION
#Xle     Yle      Zle      Chord     Ainc  Nspanwise  Sspace
1.6557    0.0     0.74     37.0114     0.0      1        0

SECTION
#Xle     Yle      Zle      Chord     Ainc  Nspanwise  Sspace
2.3455    0.0     1.11     36.3217     0.0      1        0

SECTION
#Xle     Yle      Zle      Chord     Ainc  Nspanwise  Sspace
3.235    0.0     1.48     35.4321     0.0      1        0

SECTION
#Xle     Yle      Zle      Chord     Ainc  Nspanwise  Sspace
4.8586    0.0     1.85     nan     0.0      1        0


#---------------------------------------------------------
SURFACE
nacelle
#Nchordwise  Cspace   Nspanwise  Sspace
6         1.0         12      0.0

COMPONENT
1


YDUPLICATE
0.0


SCALE
1.0  0.8572932287741795  0.8572932287741795


TRANSLATE
15.805315502576342  7.101035462164754  -1.7896420423647994


SECTION
#Xle     Yle      Zle      Chord     Ainc  Nspanwise  Sspace
0.0    -0.866     -0.5     4.115     0.0      1        0.
NACA
2410

SECTION
#Xle     Yle      Zle      Chord     Ainc  Nspanwise  Sspace
0.0    -0.5     -0.866     4.115     0.0      1        0.
NACA
2410

SECTION
#Xle     Yle      Zle      Chord     Ainc  Nspanwise  Sspace
0.0    -0.0     -1.0     4.115     0.0      1        0.
NACA
2410

SECTION
#Xle     Yle      Zle      Chord     Ainc  Nspanwise  Sspace
0.0    0.5     -0.866     4.115     0.0      1        0.
NACA
2410

SECTION
#Xle     Yle      Zle      Chord     Ainc  Nspanwise  Sspace
0.0    0.866     -0.5     4.115     0.0      1        0.
NACA
2410

SECTION
#Xle     Yle      Zle      Chord     Ainc  Nspanwise  Sspace
0.0    1.0     0.0     4.115     0.0      1        0.
NACA
2410

SECTION
#Xle     Yle      Zle      Chord     Ainc  Nspanwise  Sspace
0.0    0.866     0.5     4.115     0.0      1        0.
NACA
2410

SECTION
#Xle     Yle      Zle      Chord     Ainc  Nspanwise  Sspace
0.0    0.5     0.866     4.115     0.0      1        0.
NACA
2410

SECTION
#Xle     Yle      Zle      Chord     Ainc  Nspanwise  Sspace
0.0    0.0     1.0     4.115     0.0      1        0.
NACA
2410

SECTION
#Xle     Yle      Zle      Chord     Ainc  Nspanwise  Sspace
0.0    -0.5     0.866     4.115     0.0      1        0.
NACA
2410

SECTION
#Xle     Yle      Zle      Chord     Ainc  Nspanwise  Sspace
0.0    -0.866     0.5     4.115     0.0      1        0.
NACA
2410

SECTION
#Xle     Yle      Zle      Chord     Ainc  Nspanwise  Sspace
0.0    -1.0     0.0     4.115     0.0      1        0.
NACA
2410
